// SBML level 2 version 4

model model_0000001()
  // Somogyi1990_CaOscillations
  // This model is automatically generated from the Model BIOMD0000000114 by using libsbml. According to the terms of use, this generated model is not related with Model BIOMD0000000114 any more.
  // To retrieve the curated model, please visit BioModels Database.
  // biomodels.db:BIOMD0000000114
  // isDescribedBy pubmed:1904060
  // taxonomy:10114
  // isVersionOf GO:0051924 GO:0009755

  // Compartments:
  compartment cytoplasm = 1;  // isVersionOf GO:0005737
  compartment ER = 1; ER is "endoplasmic reticulum";  // isVersionOf GO:0005783
  compartment extracellular = 1;  // isVersionOf GO:0005576

  // Species:
  species x in ER = 1; x is "Ca_ER";  // CHEBI:29108 kegg.compound:C00076
  species y in cytoplasm = 1; y is "Ca_Cyt";  // CHEBI:29108 kegg.compound:C00076

  // Parameters:
  k = 0.01;
  // Value of alpha is changed for different figures.
  alpha = 5;
  n = 4;
  // Value of a is changed for different figures.
  a = 3;
  k1 = 2;
  beta = 1;
  gamma = 1;

  // Assignment rules:
  fy := y^n/(a^n + y^n);

  // Reactions:
  Ca_flux_into_the_cell: => y; gamma*cytoplasm;  // isVersionOf GO:0006816 GO:0007204
  reaction_0000002: x -> y; k*x*cytoplasm - k1*y*ER; reaction_0000002 is "Ca translocation between cytoplasm and ER";  // isVersionOf GO:0006816 GO:0007204 GO:0032471
  Ca_pumped_out_of_the_cell: y => ; beta*y*extracellular;  // isVersionOf GO:0006816 GO:0051481 GO:0005388
  InsP3_channel: x => y; alpha*fy*x*cytoplasm;  // isVersionOf GO:0006816 GO:0005220 GO:0051482
end
